<?xml version="1.0" encoding="UTF-8"?>
<neuroml xmlns="http://www.neuroml.org/schema/neuroml2" id="DelayedChemical">

    <!-- Fixture: one spiking cell driving another through a chemical synapse
         with an explicit 5 ms conduction delay. -->

    <ionChannelHH id="passiveChan" conductance="10pS"/>

    <ionChannelHH id="naChan" conductance="10pS" species="na">
        <gateHHrates id="m" instances="3">
            <forwardRate type="HHExpLinearRate" rate="1per_ms" midpoint="-40mV" scale="10mV"/>
            <reverseRate type="HHExpRate" rate="4per_ms" midpoint="-65mV" scale="-18mV"/>
        </gateHHrates>
        <gateHHrates id="h" instances="1">
            <forwardRate type="HHExpRate" rate="0.07per_ms" midpoint="-65mV" scale="-20mV"/>
            <reverseRate type="HHSigmoidRate" rate="1per_ms" midpoint="-35mV" scale="10mV"/>
        </gateHHrates>
    </ionChannelHH>

    <ionChannelHH id="kChan" conductance="10pS" species="k">
        <gateHHrates id="n" instances="4">
            <forwardRate type="HHExpLinearRate" rate="0.1per_ms" midpoint="-55mV" scale="10mV"/>
            <reverseRate type="HHExpRate" rate="0.125per_ms" midpoint="-65mV" scale="-80mV"/>
        </gateHHrates>
    </ionChannelHH>

    <expTwoSynapse id="ampa" gbase="0.5nS" erev="0mV" tauRise="0.5ms" tauDecay="5ms"/>

    <cell id="SpikingCell">
        <morphology id="morph">
            <segment id="0" name="soma">
                <proximal x="0" y="0" z="0" diameter="17.841242"/>
                <distal x="0" y="0" z="0" diameter="17.841242"/>
            </segment>
        </morphology>
        <biophysicalProperties id="bio">
            <membraneProperties>
                <channelDensity id="leak" ionChannel="passiveChan" condDensity="0.3 mS_per_cm2" erev="-54.3mV" ion="non_specific"/>
                <channelDensity id="naChans" ionChannel="naChan" condDensity="120 mS_per_cm2" erev="50mV" ion="na"/>
                <channelDensity id="kChans" ionChannel="kChan" condDensity="36 mS_per_cm2" erev="-77mV" ion="k"/>
                <spikeThresh value="0mV"/>
                <specificCapacitance value="1.0 uF_per_cm2"/>
                <initMembPotential value="-65mV"/>
            </membraneProperties>
            <intracellularProperties>
                <resistivity value="0.03 kohm_cm"/>
            </intracellularProperties>
        </biophysicalProperties>
    </cell>

    <pulseGenerator id="drive" delay="10ms" duration="80ms" amplitude="0.1nA"/>

    <network id="DelayedNet">
        <population id="pre" component="SpikingCell" size="1"/>
        <population id="post" component="SpikingCell" size="1"/>
        <projection id="delayedProj" presynapticPopulation="pre" postsynapticPopulation="post" synapse="ampa">
            <connectionWD id="0" preCellId="../pre[0]" postCellId="../post[0]" weight="1" delay="5ms"/>
        </projection>
        <inputList id="stim" component="drive" population="pre">
            <input id="0" target="../pre[0]" destination="synapses"/>
        </inputList>
    </network>

</neuroml>
